// COMSOL Multiphysics 6.1.0.282 model "CV-45.mph"
// Outline of the model tree

Geometry
  geom1 "Geometry 1" (3D, length unit m)
    imp1: Import | type = cad; filename = E:\MASTER\MASTER PROJECT\پایان نامه\FINAL\45\45_final.CATProduct
    wp1: WorkPlane | planetype = normalvector; normalvector = {0, 1, 1}; unite = on
    parf1: PartitionFaces
      face = imp1.Part1 boundaries 6, 7; imp1.15 boundaries 6, 7
      partitionwith = workplane
      workplane = wp1
    wp2: WorkPlane | planetype = normalvector; normalvector = {0, -1, 1}; unite = on
    parf2: PartitionFaces
      face = parf1(1) boundaries 8, 9; parf1(2) boundaries 8, 9
      partitionwith = workplane
      workplane = wp2
    fin: Finalize "Form Union"
  pgeom_fpt "Geometry" (1D, length unit m)
    pt1: Point
  pgeom_fpt2 "Geometry 2" (1D, length unit m)
    pt1: Point
  pgeom_fpt3 "Geometry 3" (1D, length unit m)
    pt1: Point
  pgeom_fpt4 "Geometry 4" (1D, length unit m)
    pt1: Point
  pgeom_fpt5 "Geometry 5" (1D, length unit m)
    pt1: Point
  pgeom_fpt6 "Geometry 6" (1D, length unit m)
    pt1: Point

Materials
  mat1: Common "blood" on all domains
    def "Basic"
      density = 1060
      dynamicviscosity = 0.004
  mat2: Common "porous" on domains 1
    def "Basic"
      porosity = 0.15
      hydraulicpermeability = 2e-18

Physics
  fp: FreeAndPorousMediaFlow on all domains
    dependent variable u = {u, v, w}
    fp1: FluidProperties (default)
    init1: init "Initial Values 1" (default)
    wallbc1: WallBC "Wall 1" (default)
    inl1: InletBoundary "Inlet 1" on boundaries 19 | BoundaryCondition = FullyDevelopedFlow; Uavfdf = 0.2545
    out1: OutletBoundary "Outlet 1" on boundaries 32
    fmp1: FluidAndMatrixProperties on domains 1 | FluidMaterial = mat1; PorousMaterial = mat2
  fpt: FluidParticleTracing "Particle Tracing for just drag force" on domains 2
    dependent variable q = {qx, qy, qz}
    wall1: Wall (default) | WallCondition = Stick
    pp1: ParticleProperties | dp = 0.023[um]; rhop_mat = userdef; rhop = 1040[kg/m^3]
    inl1: Inlet on boundaries 19 | rt = range(0,0.1,2); InitialPosition = RandomPosition; N = 100; u_src = root.comp1.u
    out1: Outlet on boundaries 32 | WallCondition = Disappear
    df1: DragForce on domains 2 | u_src = root.comp1.u
    pcnt1: ParticleCounter on boundaries 20, 22
    pcnt2: ParticleCounter on boundaries 21, 23
    pcnt3: ParticleCounter on boundaries 25
    pcnt4: ParticleCounter on boundaries 24
    pcnt5: ParticleCounter on boundaries 26, 29
    pcnt6: ParticleCounter on boundaries 27, 28
  fpt2: FluidParticleTracing "Particle Tracing for Fluid Flow all forces" on domains 2
    dependent variable q2 = {q2x, q2y, q2z}
    wall1: Wall (default) | WallCondition = Stick
    pp1: ParticleProperties | dp = 0.023[um]; rhop_mat = userdef; rhop = 1040[kg/m^3]
    inl1: Inlet on boundaries 19 | rt = range(0,0.1,2); InitialPosition = RandomPosition; N = 100; u_src = root.comp1.u
    out1: Outlet on boundaries 32 | WallCondition = Disappear
    df1: DragForce on domains 2 | u_src = root.comp1.u
    lf1: LiftForce "saffman" on domains 2 | u_src = root.comp1.u
    lf2: LiftForce "wall lift" on domains 2
      LiftLaw = WallInduced
      u_src = root.comp1.u
      ParallelBoundary1: boundaries 17, 21, 23, 24, 27, 28, 31
      ParallelBoundary2: boundaries 18, 20, 22, 25, 26, 29, 30
    pcnt1: ParticleCounter "Particle Counter p1" on boundaries 20, 22
    pcnt2: ParticleCounter "Particle Counter p2" on boundaries 21, 23
    pcnt3: ParticleCounter "Particle Counter p3" on boundaries 25
    pcnt4: ParticleCounter "Particle Counter p4" on boundaries 24
    pcnt5: ParticleCounter "Particle Counter p5" on boundaries 26, 29
    pcnt6: ParticleCounter "Particle Counter p6" on boundaries 27, 28
  fpt3: FluidParticleTracing "Particle Tracing for Fluid Flow 250" on domains 2
    dependent variable q3 = {q3x, q3y, q3z}
    wall1: Wall (default) | WallCondition = Stick
    pp1: ParticleProperties | dp = 0.023[um]; rhop_mat = userdef; rhop = 1040[kg/m^3]
    inl1: Inlet on boundaries 19 | rt = range(0,0.1,2); InitialPosition = RandomPosition; N = 250; u_src = root.comp1.u
    out1: Outlet on boundaries 32 | WallCondition = Disappear
    df1: DragForce on domains 2 | u_src = root.comp1.u
    pcnt1: ParticleCounter "Particle Counter 1 250 drag" on boundaries 20, 22
    pcnt2: ParticleCounter "Particle Counter 2 250 drag" on boundaries 21, 23
    pcnt3: ParticleCounter "Particle Counter 3 250 drag" on boundaries 25
    pcnt4: ParticleCounter "Particle Counter 4 250 drag" on boundaries 24
    pcnt5: ParticleCounter "Particle Counter 5 250 drag" on boundaries 26, 29
    pcnt6: ParticleCounter "Particle Counter 6 250 drag" on boundaries 27, 28
  fpt4: FluidParticleTracing "Particle Tracing for Fluid Flow 250 all" on domains 2
    dependent variable q4 = {q4x, q4y, q4z}
    wall1: Wall (default) | WallCondition = Stick
    pp1: ParticleProperties | dp = 0.023[um]; rhop_mat = userdef; rhop = 1040[kg/m^3]
    inl1: Inlet on boundaries 19 | rt = range(0,0.1,2); InitialPosition = RandomPosition; N = 250; u_src = root.comp1.u
    out1: Outlet on boundaries 32 | WallCondition = Disappear
    df1: DragForce on domains 2 | u_src = root.comp1.u
    lf1: LiftForce "saffman" on domains 2 | u_src = root.comp1.u
    lf2: LiftForce "Wall lift" on domains 2
      LiftLaw = WallInduced
      u_src = root.comp1.u
      ParallelBoundary1: boundaries 18, 20, 22, 25, 26, 29, 30
      ParallelBoundary2: boundaries 17, 21, 23, 24, 27, 28, 31
    pcnt1: ParticleCounter "Particle Counter 1 250 all" on boundaries 20, 22
    pcnt2: ParticleCounter "Particle Counter 2 250 all" on boundaries 21, 23
    pcnt3: ParticleCounter "Particle Counter 3 250 all" on boundaries 25
    pcnt4: ParticleCounter "Particle Counter 4 250 all" on boundaries 24
    pcnt5: ParticleCounter "Particle Counter 5 250 all" on boundaries 26, 29
    pcnt6: ParticleCounter "Particle Counter 6 250 all" on boundaries 27, 28
  fpt5: FluidParticleTracing "Particle Tracing for Fluid Flow 5 500" on domains 2
    dependent variable q5 = {q5x, q5y, q5z}
    wall1: Wall (default) | WallCondition = Stick
    pp1: ParticleProperties | dp = 0.023[um]; rhop_mat = userdef; rhop = 1040[kg/m^3]
    inl1: Inlet on boundaries 19 | rt = range(0,0.1,2); InitialPosition = RandomPosition; N = 500; u_src = root.comp1.u
    out1: Outlet on boundaries 32 | WallCondition = Disappear
    df1: DragForce on domains 2 | u_src = root.comp1.u
    pcnt1: ParticleCounter on boundaries 20, 22
    pcnt2: ParticleCounter on boundaries 21, 23
    pcnt3: ParticleCounter on boundaries 25
    pcnt4: ParticleCounter on boundaries 24
    pcnt5: ParticleCounter on boundaries 26, 29
    pcnt6: ParticleCounter on boundaries 27, 28
  fpt6: FluidParticleTracing "Particle Tracing for Fluid Flow 6 500 all" on domains 2
    dependent variable q6 = {q6x, q6y, q6z}
    wall1: Wall (default) | WallCondition = Stick
    pp1: ParticleProperties | dp = 0.023[um]; rhop_mat = userdef; rhop = 1040[kg/m^3]
    inl1: Inlet on boundaries 19 | rt = range(0,0.1,2); InitialPosition = RandomPosition; N = 250; u_src = root.comp1.u
    out1: Outlet on boundaries 32 | WallCondition = Disappear
    df1: DragForce on domains 2 | u_src = root.comp1.u
    lf1: LiftForce "saffman" on domains 2 | u_src = root.comp1.u
    lf2: LiftForce "wall lift" on domains 2
      LiftLaw = WallInduced
      u_src = root.comp1.u
      ParallelBoundary1: boundaries 18, 20, 22, 25, 26, 29, 30
      ParallelBoundary2: boundaries 17, 21, 23, 24, 27, 28, 31
    pcnt1: ParticleCounter "Particle Counter 1 p500" on boundaries 20, 22
    pcnt2: ParticleCounter "Particle Counter 2 p500" on boundaries 21, 23
    pcnt3: ParticleCounter "Particle Counter 3 p500" on boundaries 25
    pcnt4: ParticleCounter "Particle Counter 4 p500" on boundaries 24
    pcnt5: ParticleCounter "Particle Counter 5 p500" on boundaries 26, 29
    pcnt6: ParticleCounter "Particle Counter 6 p500" on boundaries 27, 28

Mesh
  mesh1 "Mesh 1"
    size: MeshSizeDefault | table = cfd; hauto = 3
    fq1: FreeQuad on boundaries 32
      dis1: Distribution on edges 45, 46 | numelem = 10
    swe1: Sweep "Swept 1" on domains 2 | sourceface = boundaries 32; targetface = boundaries 19
      dis1: Distribution on domains 2 | numelem = 100
    bl1: BndLayer "Boundary Layers 1" on domains 2
      blp: BndLayerProp "Boundary Layer Properties" on boundaries 17, 18, 20-31
        blnlayers = 5
        inittype = blhmin
        blhmin = 0.001
    fq2: FreeQuad on boundaries 3
      dis1: Distribution on edges 2, 3 | numelem = 10
    swe2: Sweep "Swept 2" on domains 1 | sourceface = boundaries 3; targetface = boundaries 16
    bl2: BndLayer "Boundary Layers 2" on domains 1
      blp: BndLayerProp "Boundary Layer Properties" on boundaries 17-32
        blnlayers = 3
        inittype = blhmin
        blhmin = 0.0001

Studies
  std1 "Study 1"
    stat: Stationary | solve for = {fp}
  std2 "Study 2"
    time: Transient "Time Dependent"
      tlist = range(0,0.1,1)
      solve for = {fpt2}
      usesol = on
      notsolmethod = sol
      notstudy = std1
  std3 "Study 3"
    time: Transient "Time Dependent for all forces"
      tlist = range(0,0.1,2)
      solve for = {fpt2}
      useinitsol = on
      initmethod = sol
      initstudy = std2
      usesol = on
      notsolmethod = sol
      notstudy = std1
  std4 "Study 4"
    time: Transient "Time Dependent"
      tlist = range(0,0.1,2)
      solve for = {fpt3}
      usesol = on
      notsolmethod = sol
      notstudy = std1
  std5 "Study 5"
    time: Transient "Time Dependent 250 all"
      tlist = range(0,0.1,2)
      solve for = {fpt4}
      usesol = on
      notsolmethod = sol
      notstudy = std1
  std6 "Study 6"
    time: Transient "Time Dependent"
      tlist = range(0,0.1,2)
      solve for = {fpt5}
      usesol = on
      notsolmethod = sol
      notstudy = std1
  std7 "Study 7"
    time: Transient "Time Dependent"
      tlist = range(0,0.1,2)
      solve for = {fpt6}
      usesol = on
      notsolmethod = sol
      notstudy = std1

Solver configurations
  sol1 "Solution 1" (study std1)
    v1: Variables "Dependent Variables 1"
    s1: Stationary "Stationary Solver 1"
      fc1: FullyCoupled | linsolver = i1; initstep = 0.01; maxiter = 100
      i1: Iterative "AMG, fluid flow variables (fp)" | nlinnormuse = on; maxlinit = 1000; rhob = 20
        mg1: Multigrid | prefun = saamg; maxcoarsedof = 80000; strconn = 0.02; saamgcompwise = on
  sol2 "Solution 2" (study std2)
    v1: Variables "Dependent Variables 1"
    t1: Time "Time-Dependent Solver 1"
      tlist = range(0,0.1,1)
      rtol = 1.0E-5
      timemethod = genalpha
      estrat = exclude
      tstepsgenalpha = strict
      fc1: FullyCoupled | linsolver = i1; ntolfact = 0.01
      i1: Iterative
        ja1: Jacobi
  sol3 "Solution 3" (study std3)
    v1: Variables "Dependent Variables 1"
    t1: Time "Time-Dependent Solver 1"
      tlist = range(0,0.1,2)
      rtol = 1.0E-5
      timemethod = genalpha
      estrat = exclude
      tstepsgenalpha = strict
      fc1: FullyCoupled | linsolver = i1; dtech = auto; ntolfact = 0.01
      i1: Iterative
        ja1: Jacobi
  sol4 "Solution 4" (study std4)
    v1: Variables "Dependent Variables 1"
    t1: Time "Time-Dependent Solver 1"
      tlist = range(0,0.1,2)
      rtol = 1.0E-5
      timemethod = genalpha
      estrat = exclude
      tstepsgenalpha = strict
      fc1: FullyCoupled | linsolver = i1; ntolfact = 0.01
      i1: Iterative
        ja1: Jacobi
  sol5 "Solution 5" (study std5)
    v1: Variables "Dependent Variables 1"
    t1: Time "Time-Dependent Solver 1"
      tlist = range(0,0.1,2)
      rtol = 1.0E-5
      timemethod = genalpha
      estrat = exclude
      tstepsgenalpha = strict
      fc1: FullyCoupled | linsolver = i1; dtech = auto; ntolfact = 0.1
      i1: Iterative
        ja1: Jacobi
  sol6 "Solution 6" (study std6)
    v1: Variables "Dependent Variables 1"
    t1: Time "Time-Dependent Solver 1"
      tlist = range(0,0.1,2)
      rtol = 1.0E-5
      timemethod = genalpha
      estrat = exclude
      tstepsgenalpha = strict
      fc1: FullyCoupled | linsolver = i1; ntolfact = 0.1
      i1: Iterative
        ja1: Jacobi
  sol7 "Solution 7" (study std7)
    // same settings as sol6